units lj
atom_style bond

boundary p p p
timestep 0.001

read_data decomp.atoms

mass 1 1.0
mass 2 1.0
mass 3 1.0

pair_style lj/cut 3.0
pair_coeff 1 1 1.0 1.0 3.0
pair_coeff 2 2 1.0 1.0 3.0
pair_coeff 3 3 1.0 1.0 3.0
pair_coeff 1 2 1.0 1.0 1.2
pair_coeff 1 3 1.0 1.0 3.0
pair_coeff 2 3 1.0 1.0 1.2

bond_style harmonic
bond_coeff * 80.0 1.2

neighbor 0.3 bin
neigh_modify every 20 delay 0 check no

velocity all create 0.7 233 units box mom yes

fix 1 all nvt temp 0.7 0.7 0.1

dump id all custom 10000 decomp.lammpstrj id type x y z vx vy vz

thermo 500
run 200000
